// COMSOL Multiphysics 4.4.0.248 model "Speed-up_revised_2018.mph"
// Many particle elctrophoresis simulations
// Outline of the model tree

Parameters
  n = 2  // number of partilces
  L = 10[um]
  aR = a/R
  a = 250[nm]
  R = 420[nm]
  d = 10*a  // Particle spacing
  epsilonr = 80  // water at room temperature
  T = 294.15 [K]
  eta = 1[mPa*s]
  U0 = 1[V]  // Applid potential
  E0 = U0/L
  n0 = (epsilonr * epsilon0_const *k_B_const*T) / (2*lambda_D^2*e_const^2*N_A_const)
  lambda_D = 6.8[nm]  // Debye Lendth
  lambda_D_0 = lambda_D  // For mesh?
  lambda_D_eq = sqrt( (epsilonr * epsilon0_const *k_B_const*T) / (2*n0*e_const^2*N_A_const) )  // Equation holder
  v0 = 1[um/s]  // Particle speed (guess)
  w_eof = -E0*sigma_w*lambda_D_eq/eta  // velocity of EOF
  eof_fraction_v1p = 0  // What is EOF strength compared to v1p
  sigma_w_est = -v1_memory(n0)*eof_fraction_v1p/E0/lambda_D_eq*eta  // equation not used: for reference
  sigma_w = -0[mC/m^2]+ 0.0*(0.734973*sqrt(n0/(1[mol/m^3]))* (-6.90776 + log(n0/(1[mol/m^3])))) [mC/m^2]  // PDMS charge from literature
  sigma_p = -1[mC/m^2] +0.0*(-104.992+63.5892*sqrt(lambda_D/(1[nm]))-9.97345*lambda_D/(1[nm]))[mC/m^2]  // Particle surface charge
  dP = 100[Pa]  // Pressure across the reserviours (independent estimate)

Functions
  an1: Analytic "Charge density Non-Linear" | funcname = rhoPB; expr = n0 *N_A_const * e_const *( exp(-e_const*phi/k_B_const/T) - exp(e_const*phi/k_B_const/T) ); args = phi; argunit = V; fununit = C/m^3
  an2: Analytic "Charge density Linear" | funcname = rho; expr = n0 *N_A_const * e_const *( exp(-e_const*phi/k_B_const/T) - exp(e_const*phi/k_B_const/T) ); args = phi; argunit = V; fununit = C/m^3
  int1: Interpolation "v1 from Memory"
    source = table
    funcname = v1_memory
    table = 
      {145.381, 0.826221}
      {93.0442, 1.03125}
      {23.261, 2.04738}
      {10.3382, 3.04828}
      {5.81526, 4.03415}
      {3.72177, 5.00488}
      {2.58456, 5.96114}
      {1.45381, 7.82914}
      {0.930442, 9.63815}
    argunit = mol/m^3
    fununit = um/s

Variables
  var1 "Variables 1"
    p1_Drag = - p1_integral( 2 *pi * r * drag.T_stressz)  // Drag on a translating particle
    p1_Fes = - p1_integral(2* pi* r * E0 * sigma_p)  // Electrostatic pull on particle 1
    p1_EO = - p1_integral( 2 * pi * r * eo.T_stressz)  // Electro-osmotic flow drag
    inlet_Drag_Flow = inlet_integral(2*pi*r*w2)  // Drag induced flow through boundary
    inlet_EO_Flow = inlet_integral(2*pi*r*w)  // E-O Backflow
    Q_eo = inlet_integral(2*pi*r*w)  // Flow across inlet
    Q_drag = inlet_integral(2*pi*r*w2)  // Flow across inlet
    hyd_friction = p1_Drag / v0  // Hydrodynamic friction coefficient (estimated on p1)
    v1_pressure = - p1_Pressure / hyd_friction  // guessed velocity of the particle
    p1_Pressure = - p1_integral( 2 *pi * r * pressure.T_stressz)  // Frad on a particle by flow around it

Selections
  sel1: Explicit "particle one" on boundaries 10, 11
  sel2: Explicit "fluid" on domains 1
  sel3: Explicit "inlet" on boundaries 5
  sel4: Explicit "outlet" on boundaries 2
  sel5: Explicit "wall" on boundaries 6, 7
  dif1: Difference "All particles but one" | entitydim = 1; add = {geom1_csel1_bnd}; subtract = {sel1}

Couplings
  intop1: Integration "Int on Particle 1" on selection sel1 | opname = p1_integral
  intop2: Integration on selection sel3 | opname = inlet_integral

Geometry
  geom1 "Geometry 1" (2D axisymmetric, length unit nm)
    r1: Rectangle "channel" | pos = {0, -L/2}; size = {R, L}
    c1: Circle "particle" | pos = {0, d/2}; rot = -90; r = a; angle = 180
    sel1: ExplicitSelection "particles 1" | selection = c1(1) boundaries 1, 2; contributeto = csel1.bnd
    if1: If | condition = n >= 2
    c2: Circle "particle 2" | pos = {0, -d/2}; rot = -90; r = a; angle = 180
    sel2: ExplicitSelection "particles 2" | selection = c2(1) boundaries 1, 2; contributeto = csel1.bnd
    endif1: EndIf
    if2: If | condition = n >= 3
    c3: Circle "particle 3" | pos = {0, -d/2 - d}; rot = -90; r = a; angle = 180
    sel3: ExplicitSelection | selection = c3(1) boundaries 1, 2; contributeto = csel1.dom
    endif2: EndIf
    if3: If | condition = n >= 4
    c5: Circle "particle -1" | pos = {0, d/2+d}; rot = -90; r = a; angle = 180
    sel4: ExplicitSelection | selection = c5(1) boundaries 1, 2; contributeto = csel1.dom
    endif3: EndIf
    if4: If | condition = n >= 5
    c4: Circle "particle 4" | pos = {0, -d/2 - d*2}; rot = -90; r = a; angle = 180
    sel5: ExplicitSelection | selection = c4(1) boundaries 1, 2; contributeto = csel1.dom
    endif4: EndIf
    if5: If | condition = n >= 6
    c6: Circle "particle -2" | pos = {0, d/2+d*2}; rot = -90; r = a; angle = 180
    sel6: ExplicitSelection | selection = c6(1) boundaries 1, 2; contributeto = csel1.dom
    endif5: EndIf
    pt1: Point | p = {R, (-L/2 + L/10)}
    dif1: Difference | input = r1; input2 = c1, c2, c3, c4, c5, c6
    fin: Finalize "Form Union"

Materials
  mat2 "colloid" on no domains
    def "Basic"
      relpermittivity = 2.5
      electricconductivity = 10^-14[S/m]
  mat3 "Water" on domains 1
    def "Basic"
      dynamicviscosity = eta
      ratioofspecificheat = 1.0
      electricconductivity = 2.77[mS/cm]
      heatcapacity = Cp(T[1/K])[J/(kg*K)]
      density = rho(T[1/K])[kg/m^3]
      thermalconductivity = k(T[1/K])[W/(m*K)]
      soundspeed = cs(T[1/K])[m/s]
      relpermittivity = 82
      eta: Piecewise
        arg = T
        extrap = constant
        pieces = 
          {273.15, 413.15, 1.3799566804-0.021224019151*T^1+1.3604562827E-4*T^2-4.6454090319E-7*T^3+8.9042735735E-10*T^4-9.0790692686E-13*T^5+3.8457331488E-16*T^6}
          {413.15, 553.75, 0.00401235783-2.10746715E-5*T^1+3.85772275E-8*T^2-2.39730284E-11*T^3}
      Cp: Piecewise | arg = T; extrap = constant; pieces = {273.15, 553.75, 12010.1471-80.4072879*T^1+0.309866854*T^2-5.38186884E-4*T^3+3.62536437E-7*T^4}
      rho: Piecewise | arg = T; extrap = constant; pieces = {273.15, 553.75, 838.466135+1.40050603*T^1-0.0030112376*T^2+3.71822313E-7*T^3}
      k: Piecewise | arg = T; extrap = constant; pieces = {273.15, 553.75, -0.869083936+0.00894880345*T^1-1.58366345E-5*T^2+7.97543259E-9*T^3}
      cs: Interpolation | source = table; table = {{273, 1403}, {278, 1427}, {283, 1447}, {293, 1481}, {303, 1507}, {313, 1526}, {323, 1541}, {333, 1552}, {343, 1555}, {353, 1555}, {363, 1550}, {373, 1543}}; interp = piecewisecubic; extrap = const

Physics
  ec: ConductiveMedia "Electric Currents" (disabled) on all domains
    dependent variable V
    cucn1: CurrentConservation (default) | minput_temperature = T
    axi1: AxialSymmetry (default)
    ein1: ElectricInsulation (default)
    init1: init "Initial Values 1" (default)
    term1: Terminal on selection sel3 | TerminalType = Voltage; V0 = 0
    term2: Terminal on selection sel4 | TerminalType = Voltage; V0 = U0
  poeq: PoissonEquation "Poisson-Boltzmann Equation" on selection sel2
    dependent variable phi
    Units.DependentVariableQuantity = electricpotential
    Units.CustomSourceTermUnit = V*m^-1
    peq1: PoissonEquation "Poisson's Equation 1" (default)
      f = - r * 2*e_const*n0*N_A_const/epsilonr/epsilon0_const * sinh(e_const * phi / (k_B_const *T))
      c = {r, 0, 0, r}
    zflx1: ZeroFluxBoundary "Zero Flux 1" (default)
    init1: init "Initial Values 1" (default)
    peq2: PoissonEquation "Debye Huckel eq" on selection sel2
      f = - r * 2*e_const*n0*N_A_const/epsilonr/epsilon0_const * e_const * phi / (k_B_const *T)
      c = {r, 0, 0, r}
    flux1: FluxBoundary "Charge on Particles" on selection geom1_csel1_bnd | g = sigma_p/epsilonr/epsilon0_const*r
    dir1: DirichletBoundary "zeta potential on particle" (disabled) on selection sel1 | r = zeta_p
    flux2: FluxBoundary "Charge on Walls" on selection sel5 | g = sigma_w / epsilonr / epsilon0_const * r
    flux3: FluxBoundary "Charge on Walls (fraction of EOF)" (disabled) on selection sel5
      g = (-v1_memory(n0)*eof_fraction_v1p/E0/lambda_D_eq*eta) / epsilonr/epsilon0_const * r
  spf: LaminarFlow "electro-osmotic flow" on selection sel2
    dependent variable u = {u, v, w}
    ShapeProperty.order_fluid = 2
    CompressibilityProperty.Compressibility = Incompressible
    StokesFlowProp.StokesFlowProp = 1
    SwirlFlow.SwirlFlow = 0
    fp1: FluidProperties (default) | minput_temperature = T
    axi1: AxialSymmetry (default)
    wall1: Wall (default)
    init1: init "Initial Values 1" (default)
    prpc1: PressurePointConstraint on points 10
    vf1: VolumeForce on selection sel2 | F = {0, 0, -rhoPB(phi)*E0}
    pfc1: PeriodicFlowCondition on boundaries 2, 5 | pdiff = -3*eo.mu*Q_eo/R^3
    open1: OpenBoundary (disabled) on boundaries 2, 5 | f0 = -3*eo.mu*Q_eo/R^3
  spf2: LaminarFlow "Hydrodynamic friction" on selection sel2
    dependent variable u2 = {u2, v2, w2}
    CompressibilityProperty.Compressibility = Incompressible
    StokesFlowProp.StokesFlowProp = 1
    TurbulenceProperty.TurbulenceModelType = None
    SwirlFlow.SwirlFlow = 0
    fp1: FluidProperties (default) | minput_temperature = T
    axi1: AxialSymmetry (default)
    wall1: Wall (default) | BoundaryCondition = NoSlip; uwall = {0, 0, u}
    init1: init "Initial Values 1" (default)
    wall2: Wall "Moving particles" on selection geom1_csel1_bnd | BoundaryCondition = MovingWall; uwall = {0, 0, v0}
    prpc1: PressurePointConstraint "Pressure Point" on points 10
    pfc1: PeriodicFlowCondition "Periodic BC" on boundaries 2, 5 | pdiff = -3*drag.mu*Q_drag/R^3
    open1: OpenBoundary (disabled) on boundaries 2, 5 | BoundaryCondition = NormalStress; f0 = -3*drag.mu*Q_drag/R^3
  phys1: CreepingFlow "Pressure driven" on selection sel2
    // This simulation estimates force on stationary particles and then used hydrodynamic friction coefficient to find particle velocity for this pressure flow.
    dependent variable u3 = {u3, v3, w3}
    CompressibilityProperty.Compressibility = Incompressible
    fp1: FluidProperties (default)
    axi1: AxialSymmetry (default)
    wall1: Wall (default)
    init1: init "Initial Values 1" (default)
    inl1: Inlet on selection sel3 | BoundaryCondition = PressureNoViscousStress; p0 = dP
    out1: OutletBoundary "Outlet 1" on selection sel4 | NormalFlow = 0
  phys2: CreepingFlow "Sanity check" on all domains
    // Check if net force on particle is zero
    dependent variable u4 = {u4, v4, w4}
    fp1: FluidProperties (default)
    axi1: AxialSymmetry (default)
    wall1: Wall (default)
    init1: init "Initial Values 1" (default)
    inl1: Inlet on selection sel3 | BoundaryCondition = PressureNoViscousStress; p0 = dP
    out1: OutletBoundary "Outlet 1" on selection sel4
    wall2: Wall "particles" on selection geom1_csel1_bnd | BoundaryCondition = MovingWall; uwall = {0, 0, v1_pressure}

Mesh
  mesh1 "Mesh 1"
    size: MeshSizeDefault | hauto = 2
    size1: Size on selection sel2 | hauto = 5
    size2: Size "Size 2: wall" on selection sel5 | hauto = 2; custom = off
    size3: Size "Size: particles" on selection geom1_csel1_bnd | table = cfd; hmax = lambda_D_0/6; hauto = 5; custom = on
    cr1: CornerRefinement on selection sel2 | boundary = selection geom1_csel1_bnd
    ftri1: FreeTri "Free Triangular 1" on selection sel2
    bl1: BndLayer "Boundary Layers 1" on selection sel2
      blp1: BndLayerProp "Boundary Layer Properties 1" on selection geom1_csel1_bnd
        blnlayers = 20
        blstretch = 1.1
        inittype = blhmin
        blhmin = lambda_D_0/20
      blp2: BndLayerProp "Boundary Layer Properties 2" on selection sel5
        blnlayers = 10
        blstretch = 1.15
        inittype = blhmin
        blhminfact = 2
        blhmin = lambda_D_0/20
    ftri2: FreeTri "Free Triangular 2" (disabled) on remaining entities
      xscale = 1
      yscale = 1
      smoothcontrol = on
      smoothmaxiter = 8
      smoothmaxdepth = 8
  mesh2 "Mesh Test x2"
    size: MeshSizeDefault | hmax = 100; hmin = 0.2; hcurve = 0.2; hnarrow = 1; hgrad = 1.1; hauto = 1
    size1: Size on selection sel2 | hauto = 3
    size2: Size on selection sel5 | hauto = 1
    size3: Size "Size: particles" on selection sel1 | table = cfd; hmax = lambda_D_0/8; hauto = 5; custom = on
    cr1: CornerRefinement on selection sel2 | boundary = boundaries 6, 7
    ftri1: FreeTri "Free Triangular 1" on selection sel2
    bl1: BndLayer "Boundary Layers 1" on selection sel2
      blp1: BndLayerProp "Boundary Layer Properties 1" on selection geom1_csel1_bnd
        blnlayers = 30
        blstretch = 1.1
        inittype = blhmin
        blhmin = lambda_D_0/30
      blp2: BndLayerProp "Boundary Layer Properties 2" on selection sel5 | blhminfact = 2
    ftri2: FreeTri "Free Triangular 2" (disabled) on remaining entities
      xscale = 1
      yscale = 1
      smoothcontrol = on
      smoothmaxiter = 8
      smoothmaxdepth = 8
  mesh3 "Mesh Auto" (physics-controlled)
    size: MeshSizeDefault | table = cfd; hauto = 3

Studies
  std1 "Study 1"
    param5: Parametric "Sweep: wall charge" | sweeptype = filled; pname = n; plistarr = 1,2
    param4: Parametric "Sweep: surface charge" (disabled) | sweeptype = filled; pname = n; plistarr = 1,2
    param3: Parametric "Sweep: N" (disabled) | pname = n; plistarr = 1,2
    param2: Parametric "Sweep: aR" (disabled) | pname = aR; plistarr = 0.2, 0.3, 0.4, 0.5, 0.6, 0.7, 0.8
    param: Parametric "Sweep: Debye length" (disabled)
      sweeptype = filled
      pname = {lambda_D, n}
      plistarr = {"0.8[nm], 1.0 [nm],1.5[nm], 2[nm],3[nm], 4[nm],5[nm], 6[nm],8[nm], 10[nm]", "1,2"}
    statf2: StationaryFluid "hyd friction coef" | physselection = ec; solve for = {spf2}; mesh = {geom1, mesh1}
    stat: Stationary "Electrokinetics"
      physselection = ec
      solve for = {poeq, spf}
      mesh = {geom1, mesh1}
      pname = n0
      plistarr = 3[mol/m^3],5[mol/m^3],10[mol/m^3], 25[mol/m^3], 100[mol/m^3], 400[mol/m^3]
    statf3: StationaryFluid "Pressure" | physselection = ec; solve for = {phys1}; mesh = {geom1, mesh1}
    statf: StationaryFluid "Pressure check"
      physselection = ec
      solve for = {phys2}
      initmethod = sol
      initstudy = std1
      mesh = {geom1, mesh1}

Solver configurations
  sol1 "Solver 1" (study std1)
    v1: Variables "Dependent Variables 1"
    s1: Stationary "Stationary Solver 1"
      fc1: FullyCoupled | linsolver = d1; dtech = auto; initstep = 0.01; minstep = 1.0E-6; maxiter = 25
      d1: Direct | linsolver = pardiso
    su1: StoreSolution
    v2: Variables "Dependent Variables 2" | initmethod = sol; notsolmethod = sol
    s2: Stationary "Stationary Solver 2"
      fc1: FullyCoupled | linsolver = d1
      d1: Direct
    su2: StoreSolution
    v3: Variables "Dependent Variables 3" | initmethod = sol; notsolmethod = sol
    s3: Stationary "Stationary Solver 3"
      fc1: FullyCoupled | linsolver = d1; dtech = auto; initstep = 0.01; minstep = 1.0E-6; maxiter = 25
      d1: Direct | linsolver = pardiso
    su3: StoreSolution
    v4: Variables "Dependent Variables 4" | initmethod = sol; notsolmethod = sol
    s4: Stationary "Stationary Solver 4"
      fc1: FullyCoupled | linsolver = d1; dtech = auto; initstep = 0.01; minstep = 1.0E-6; maxiter = 25
      d1: Direct | linsolver = pardiso
  sol5 "Parametric 5" (study std1)
  sol4 "Store Solution 4" (study std1)
  sol3 "Store Solution 3" (study std1)
  sol2 "Store Solution 2" (study std1)

Datasets
  dset1: Solution | solution = sol1
  dset2: Solution | solution = sol2
  dset3: Solution | solution = sol3
  dset4: Solution | solution = sol4
  dset5: Solution | solution = sol5

Derived values
  int1: IntLine "Drag Force" | data = dset4; table = tbl1; expr = drag.T_stressz*2*pi*r; unit = fN; descr = Drag
  int2: IntLine "E-O force" | data = none; table = tbl2; expr = eo.T_stressz*2*pi*r; unit = pN
  int4: IntLine "Unbalanced Force"
    data = none
    table = tbl4
    expr = (-eo.T_stressz*2*pi*r + E0*charge_density_colloid*2*pi*r)
    unit = fN
    descr = Force unbalanced
  int3: IntLine "Combined Force"
    data = none
    table = tbl3
    expr = -1/0.51803*drag.T_stressz*2*pi*r + eo.T_stressz*2*pi*r + E0*charge_density_colloid*2*pi*r
    unit = fN
    descr = Total Force
  int5: IntLine "Surface potential" | data = none; table = tbl5; expr = phi*2*pi*r / (4*pi*a^2); unit = mV
  gev1: EvalGlobal "Drag on P1 (unscaled)" | data = none; table = tbl6; expr = p1_Drag; unit = pN; descr = F_drag
  gev2: EvalGlobal "Electro Static pull on P1" | data = none; table = tbl7; expr = p1_Fes; unit = pN; descr = F_es
  gev3: EvalGlobal "Electro-Osmotic drag on P1" | data = none; table = tbl8; expr = p1_EO; unit = pN; descr = F_eo
  gev4: EvalGlobal "Velocity of P1"
    data = none
    table = tbl9
    expr = v0* (p1_Fes + p1_EO)/(-p1_Drag)
    unit = µm/s
    descr = velocity
  gev8: EvalGlobal "Velocity of P1 - EOF"
    data = none
    table = tbl9
    expr = u0* (p1_Fes + p1_EO)/(-p1_Drag) - u_eof
    unit = um/s
    descr = velocity
  gev5: EvalGlobal "Drag Induced Flow (scaled)"
    data = none
    table = tbl11
    expr = inlet_Drag_Flow* (p1_Fes + p1_EO)/(-p1_Drag)
    unit = um^3/s
    descr = u_piston_effect
  gev6: EvalGlobal "E-O Induced Flow"
    data = none
    table = tbl12
    expr = inlet_EO_Flow
    unit = um^3/s
    descr = u_backflow
  gev7: EvalGlobal "Net Flow at inlet (scaled)"
    data = none
    table = tbl13
    expr = inlet_EO_Flow + inlet_Drag_Flow * (p1_Fes + p1_EO)/(-p1_Drag)
    unit = um^3/s
    descr = u_net
  gev9: EvalGlobal "salt concentration" | data = none; table = tbl15; expr = n0
  gev10: EvalGlobal "w_eof" | data = none; table = tbl16; expr = w_eof; unit = um/s
  gev11: EvalGlobal "Wall surface charge" | data = none; table = tbl17; expr = sigma_w
  av1: AvLine "v_N" | data = none; table = tbl18; expr = w+w2* (p1_Fes + p1_EO)/(-p1_Drag); unit = µm/s; descr = v_N
  int6: IntLine "Test: drag for pressure exp" on selection sel1
    data = dset5
    table = tbl19
    expr = pressure.T_stressz*2*pi*r
    unit = fN
  gev12: EvalGlobal "v1_pressure" | data = dset5; table = tbl20; expr = v1_pressure; unit = µm/s

Tables
  tbl1: Table
    // Line Integration 1 (drag.T_stressz*2*pi*r)
    Drag (fN)
    13.7465
  tbl2: Table
    // Line Integration 2 (eo.T_stressz*2*pi*r)
    n | sigma_w | eo.T_stressz*2*pi*r (pN) | eo.T_stressz*2*pi*r (pN)
    1 | 0 | 68.7404 | 68.8973
    2 | 0 | 70.8791 | 71.0573
  tbl5: Table
    // Surface potential (phi*2*pi*r / (4*pi*a^2))
    phi*2*pi*r / (4*pi*a^2) (mV)
    4.13395
  tbl6: Table
    // Drag on P1 (p1_Drag)
    charge_density_colloid | n | F_drag (pN)
    -0.0001 | 1 | -0.0249424
    -0.0001 | 2 | -0.0199329
    -0.0002 | 1 | -0.0249424
    -0.0002 | 2 | -0.0199329
    -0.0004 | 1 | -0.0249424
    -0.0004 | 2 | -0.0199329
    -0.0007 | 1 | -0.0249424
    -0.0007 | 2 | -0.0199329
    -0.001 | 1 | -0.0249424
    -0.001 | 2 | -0.0199329
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  tbl7: Table
    // Electro Static pull on P1 (p1_Fes)
    charge_density_colloid | n | F_es (pN)
    -0.0001 | 1 | 0.000785397
    -0.0001 | 2 | 0.000785397
    -0.0002 | 1 | 0.00157079
    -0.0002 | 2 | 0.00157079
    -0.0004 | 1 | 0.00314159
    -0.0004 | 2 | 0.00314159
    -0.0007 | 1 | 0.00549778
    -0.0007 | 2 | 0.00549778
    -0.001 | 1 | 0.00785397
    -0.001 | 2 | 0.00785397
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  tbl8: Table
    // Electro-Osmotic drag on P1 (p1_EO)
    charge_density_colloid | n | F_eo (pN)
    -0.0001 | 1 | -0.000727892
    -0.0001 | 2 | -0.000738036
    -0.0002 | 1 | -0.00145594
    -0.0002 | 2 | -0.00147623
    -0.0004 | 1 | -0.00291315
    -0.0004 | 2 | -0.00295373
    -0.0007 | 1 | -0.00510408
    -0.0007 | 2 | -0.00517513
    -0.001 | 1 | -0.00730499
    -0.001 | 2 | -0.00740655
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  tbl9: Table
    // Velocity of P1 (u0* (p1_Fes + p1_EO)/p1_Drag)
    n | sigma_w | velocity (µm/s) | velocity (µm/s)
    1 | 0 | 283.346 | 283.762
    2 | 0 | 290.769 | 291.593
  tbl11: Table
    // Drag Induced Flow (inlet_Drag_Flow)
    Piston Effect (um^3/s) | Piston Effect (um^3/s) | Piston Effect (um^3/s) | Piston Effect (um^3/s) | Piston Effect (um^3/s) | Piston Effect (um^3/s) | Piston Effect (um^3/s)
    0.040086 | 0.0397749 | 0.0100336 | 0.00591168 | 0.589506 | 0.00308926 | 0.00305475
  tbl12: Table
    // E-O Induced Flow (inlet_OE_Flow)
    E-O Backflow (um^3/s) | E-O Backflow (um^3/s) | E-O Backflow (um^3/s) | E-O Backflow (um^3/s) | E-O Backflow (um^3/s) | E-O Backflow (um^3/s) | E-O Backflow (um^3/s)
    -0.0340927 | -0.0340953 | -0.00264078 | -0.0026407 | -0.0023745 | -0.00264045 | -0.00264046
  tbl13: Table
    // Net Flow through the boundary (inlet_Drag_flow + inlet_EO_Flow)
    n | sigma_w | u_net (um^3/s) | u_net (um^3/s)
    1 | 0 | 2.65582 | 2.80251
    2 | 0 | 5.27479 | 5.56633
  tbl14: Table
    // Global Evaluation 8 (n0)
    lambda_D | n | n0 (mol/m^3)
    8e-10 | 1 | 149.016
    8e-10 | 2 | 149.016
    1e-09 | 1 | 95.3703
    1e-09 | 2 | 95.3703
    2e-09 | 1 | 23.8426
    2e-09 | 2 | 23.8426
    3e-09 | 1 | 10.5967
    3e-09 | 2 | 10.5967
    4e-09 | 1 | 5.96064
    4e-09 | 2 | 5.96064
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  tbl15: Table
    // salt concentration (n0)
    lambda_D | n | n0 (mol/m^3)
    8e-10 | 1 | 145.381
    8e-10 | 2 | 145.381
    1e-09 | 1 | 93.0442
    1e-09 | 2 | 93.0442
    1.5e-09 | 1 | 41.353
    1.5e-09 | 2 | 41.353
    2e-09 | 1 | 23.261
    2e-09 | 2 | 23.261
    3e-09 | 1 | 10.3382
    3e-09 | 2 | 10.3382
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  tbl16: Table
    // Global Evaluation 10 (u_eof)
    n | sigma_w | velocity of EOF (um/s)
    1 | 0.0001 | -68
    1 | 5e-05 | -34
    1 | -0 | 0
    1 | -5e-05 | 34
    1 | -0.0001 | 68
    1 | -0.00015 | 102
    1 | -0.0002 | 136
    1 | -0.00025 | 170
    1 | -0.0003 | 204
    1 | -0.00035 | 238
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  tbl17: Table
    // Wall surface charge (-v1_memory(n0)*eof_fraction_v1p/E0/lambda_D_eq*eta)
    n | sigma_w | sigma_w
    1 | 0 | 0
    2 | 0 | 0
  tbl18: Table
    // Line Average 1 (sqrt( (u + u2* (p1_Fes + p1_EO)/(-p1_Drag))^2 + (w+w2* (p1_Fes + p1_EO)/(-p1_Drag))^2 ))
    n | sigma_w | v_N (µm/s)
    1 | 0.0001 | 347.016
    1 | 5e-05 | 315.18
    1 | -0 | 283.346
    1 | -5e-05 | 251.511
    1 | -0.0001 | 219.675
    1 | -0.00015 | 187.836
    1 | -0.0002 | 155.994
    1 | -0.00025 | 124.146
    1 | -0.0003 | 92.2917
    1 | -0.00035 | 60.4297
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  tbl19: Table
    // Line Integration 6 (drag.T_stressz*2*pi*r)
    n | pressureCheck.T_stressz*2*pi*r (fN) | pressure.T_stressz*2*pi*r (fN) | pressure.T_stressz*2*pi*r (fN) | pressureCheck.T_stressz*2*pi*r (fN) | pressureCheck.T_stressz*2*pi*r (fN) | pressureCheck.T_stressz*2*pi*r (fN) | pressureCheck.T_stressz*2*pi*r (fN) | pressureCheck.T_stressz*2*pi*r (fN) | pressureCheck.T_stressz*2*pi*r (fN) | pressure.T_stressz*2*pi*r (fN)
    1 | 22242.4 | 17302.6 | 17302.6 | 12363 | 211.435 | 0 | 211.435 | 12363 | 211.435 | 11674.1
    2 | 34564.2 | 17513.9 | 17513.9 | 463.772 | 231.886 | 231.886 | 231.886 | 463.772 | 231.886 | 8756.96
  tbl20: Table
    // Global Evaluation 12 (v1_pressure)
    n | guessed velocity of the particle (µm/s) | guessed velocity of the particle (µm/s)
    1 | 337.556 | -337.556
    2 | 332.386 | -332.386

Plots
  pg9: PlotGroup2D "Electro-osmotic flow" | data = none
    surf1: Surface | expr = eo.U
    str1: Streamline | expr = {u, w}; selnumber = 4; startmethod = coord; xcoord = range(0,R/10,R); ycoord = L/2
    arws1: ArrowSurface (disabled)
      expr = {u, w}
      xnumber = 5
      arrowymethod = coord
      ynumber = 10
      ycoord = 1800[nm], 700[nm]
      arrowlength = normalized
  pg10: PlotGroup2D "moving particle flow" | data = none
    surf1: Surface | expr = drag.U * (p1_Fes + p1_EO)/(-p1_Drag)
    str1: Streamline (disabled) | expr = {u2, w2}; selnumber = 6
    str2: Streamline
      expr = {u2* (p1_Fes + p1_EO)/(-p1_Drag), w2* (p1_Fes + p1_EO)/(-p1_Drag)}
      selnumber = 20
      startmethod = number
      xcoord = range(0,R/10,R)
      ycoord = L/2
    arws1: ArrowSurface (disabled)
      expr = {u2* (p1_Fes + p1_EO)/(-p1_Drag), w2* (p1_Fes + p1_EO)/(-p1_Drag)}
      xnumber = 5
      arrowymethod = coord
      ycoord = 1800[nm], 700[nm]
      arrowlength = normalized
  pg11: PlotGroup2D "combined flows" | data = none
    surf1: Surface
      expr = sqrt( (u + u2* (p1_Fes + p1_EO)/(-p1_Drag))^2 + (w+w2* (p1_Fes + p1_EO)/(-p1_Drag))^2 )
      wireframe = off
    str1: Streamline
      expr = {u+ u2* (p1_Fes + p1_EO)/(-p1_Drag), w+ w2* (p1_Fes + p1_EO)/(-p1_Drag)}
      selnumber = 26
      startmethod = coord
      xcoord = range(0,R/10,R)
      ycoord = L/2.1
    str2: Streamline (disabled)
      expr = {u+ u2* (p1_Fes + p1_EO)/(-p1_Drag), w+ w2* (p1_Fes + p1_EO)/(-p1_Drag)}
      selnumber = 1
      startmethod = coord
      xcoord = range(-R,R/4,R)
      ycoord = -L/2
    arws1: ArrowSurface (disabled)
      expr = {u+u2* (p1_Fes + p1_EO)/(-p1_Drag), w+w2* (p1_Fes + p1_EO)/(-p1_Drag)}
      xnumber = 5
      arrowymethod = coord
      ycoord = 1800[nm], 700[nm]
      arrowlength = normalized
  pg12: PlotGroup2D "charge" | data = none
    surf1: Surface | expr = rho(phi)
  pg13: PlotGroup1D "surface potential" | data = none
    lngr1: LineGraph | expr = eo.T_stressz; xdata = expr; xdataexpr = z
    lngr2: LineGraph | expr = eo.T_stressr; xdata = expr; xdataexpr = z
    lngr3: LineGraph | expr = drag.T_stressz; xdata = expr; xdataexpr = z
  pg14: PlotGroup1D "1D Plot Group 14" | data = none
    tblp1: Table "Table Graph 1" | table = tbl9
  pg15: PlotGroup1D "Radial Flow" | data = none
    lngr1: LineGraph | expr = w+ w2* (p1_Fes + p1_EO)/(-p1_Drag); xdata = expr; xdataexpr = r
    lngr2: LineGraph | expr = w; xdata = expr; xdataexpr = r
  pg16: PlotGroup1D "1D Plot Group 16" | data = none
    tblp1: Table "Table Graph 1" | table = tbl7
  pg17: PlotGroup1D "1D Plot Group 17" | data = none
    tblp1: Table "Table Graph 1" | table = tbl8
  pg18: PlotGroup1D "Ion distribution" | data = none; xlabel = r (nm); ylabel = Ion concentrations - ni / n0
    lngr1: LineGraph "n+" | expr = exp(-e_const*phi/k_B_const/T); xdata = expr; xdataexpr = r
    lngr2: LineGraph "n-" | expr = exp(e_const*phi/k_B_const/T); xdata = expr; xdataexpr = r
    lngr3: LineGraph "n+ linear (dotted)" | expr = (1-e_const*phi/k_B_const/T); xdata = expr; xdataexpr = r
    lngr4: LineGraph "n- linear (dotted)" | expr = (1+e_const*phi/k_B_const/T); xdata = expr; xdataexpr = r
  pg19: PlotGroup1D "velocity on Particl One" | data = none
    lngr1: LineGraph
      expr = sqrt( (u + u2* (p1_Fes + p1_EO)/(-p1_Drag))^2 + (w+w2* (p1_Fes + p1_EO)/(-p1_Drag))^2 )
      unit = µm/s
      descr = normalised velocity
  pg20: PlotGroup1D "Flow across the boundary" | data = none
    lngr1: LineGraph "inlet"
      expr = sqrt( (u + u2* (p1_Fes + p1_EO)/(-p1_Drag))^2 + (w+w2* (p1_Fes + p1_EO)/(-p1_Drag))^2 )
      unit = µm/s
      xdata = expr
      xdataexpr = r
    lngr2: LineGraph "only z component"
      expr = abs( w+w2* (p1_Fes + p1_EO)/(-p1_Drag) )
      unit = µm/s
      xdata = expr
      xdataexpr = r
    lngr3: LineGraph "outlet"
      expr = sqrt( (u + u2* (p1_Fes + p1_EO)/(-p1_Drag))^2 + (w+w2* (p1_Fes + p1_EO)/(-p1_Drag))^2 )
      unit = µm/s
      xdata = expr
      xdataexpr = r
  pg21: PlotGroup1D "1D Plot Group 21" | data = none
    tblp1: Table "Table Graph 1" | table = tbl18
  pg22: PlotGroup2D "2D Plot Group 22" | data = dset5
    arwl1: ArrowLine | expr = {u4, w4}; arrowlength = normalized; weight = {1, 1}
    surf1: Surface | expr = pressureCheck.U; unit = µm/s